V1 := [4; 2; 7]
V2 := [7; 9; 9]
VectorMult := V1×V2 = [-45; 13; 22]
ModVec := |V1| = 8.30662
CosV1V2 := V1*V2/(|V1|*|V2|) = 0.90336
ScalarMult := V1*V2 = 109
PView := [2; 2; 1]
R[0] := PView[0]*cos(PView[1])*sin(PView[2])
R[1] := PView[0]*sin(PView[1])*sin(PView[2])
R[2] := PView[0]*cos(PView[2])
R = [-0.700351; 1.53029; 1.0806]
