V1 := [8; 9; 5]
V2 := [3; 4; 2]
VecMult := vectorize(V1)×vectorize(V2)
ScalMult := vectorize(V1)*vectorize(V2)
|V1| = 13.0384
VecMult = [-2; -1; 5]
ScalMult = 70
ScalMult/(|vectorize(V1)|*|vectorize(V2)|) = 0.996953
PView := [1; 3; 3]
x := PView[0]
fi := PView[1]
tetha := PView[2]
DecPView := [x*cos(fi)*sin(tetha); x*sin(fi)*sin(tetha); x*cos(fi)]
DecPView = [-0.139708; 0.0199149; -0.989992]
sph2xyz(PView) = [-0.139708; 0.0199149; -0.989992]
