A := [6, 7, 7; 5, 3, 3; 9, 4, 1]
B := [4, 2, 2; 8, 7, 6; 4, 5, 2]
V1 := [8; 9; 5]
V2 := [3; 4; 2]
C1 := A + B
C2 := A*B
D := A*V1
Q := transpose(V1)*V2
P := transpose(V1)*A*V2
C1 = [10, 9, 9; 13, 10, 9; 13, 9, 3]
C2 = [108, 96, 68; 56, 46, 34; 72, 51, 44]
D = [146; 82; 113]
Q = 70
P = 1002
