A := [9, 9, 6; 1, 1, 6; 8, 6, 10]
B := [2, 10, 9; 1, 6, 7; 10, 2, 10]
V1 := [4; 2; 7]
V2 := [7; 9; 9]
C1 := A + B = [11, 19, 15; 2, 7, 13; 18, 8, 20]
C2 := A*B = [87, 156, 204; 63, 28, 76; 122, 136, 214]
q := transpose(V1)*V2 = 109
D := A*V1 = [96; 48; 114]
p := transpose(V1)*A*V2 = 2332
