f(x) := sqrt(|x|)*sin(π*x)
x1 := -6
x2 := 6
deltaX := 0.1
# Область отображения в окне
Xlw := 100
Ylw := 200
Xhw := 800
Yhw := 900
N := round((x2 - x1)/deltaX) = 120
i := 0 .. N
X[i] := x1 + i*deltaX
Y[i] := f(X[i])
Z[i] := 1
# Область отображения в мировой системе координат
Xl := min(X) = -6
Xh := max(X) = 6
Yl := min(Y) = -2.34521
Yh := max(Y) = 2.34521
M := stack(transpose(X), transpose(Y), transpose(Z))
deltaXw := Xhw - Xlw = 700
deltax := Xh - Xl = 12
deltaYw := Yhw - Ylw = 700
deltay := Yh - Yl = 4.69042
ky := deltaYw/deltay = 149.241
kx := deltaXw/deltax = 58.3333
# Матрица пересчетов из МСК в ОСК
Tsw := [kx, 0, Xlw - kx*Xl; 0, -ky, Yhw + ky*Yl; 0, 0, 1]
Mw := Tsw*M
Xw := transpose(Mw)[:, 0]
Yw := transpose(Mw)[:, 1]
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