f(x) := sin(x)/x
x_1 := -3*π
x_2 := 3*π
Δx := π/36
x_LW := 100
y_LW := 200
x_HW := 800
y_HW := 900
n := round((x_2 - x_1)/Δx)
n = 216
i := 0 .. n
x[i] := x_1 + i*Δx
z[i] := 1
y[i] := f(x[i])
X_L := min(x)
Y_H := max(y)
X_L = -9.42478
Y_H = 1
X_H := max(x)
Y_L := min(y)
X_H = 9.42478
Y_L = -0.217033
M_S := stack(transpose(x), transpose(y), transpose(z))
Δx_w := x_HW - x_LW
Δx_w = 700
ΔX := X_H - X_L
ΔX = 18.8496
Δy_w := y_HW - y_LW
Δy_w = 700
ΔY := Y_H - Y_L
ΔY = 1.21703
K_x := Δx_w/ΔX
K_x = 37.1362
K_y := Δy_w/ΔY
K_y = 575.169
T_SW := [K_x, 0, x_LW - K_x*X_L; 0, -K_y, y_HW + K_y*Y_L; 0, 0, 1]
M_W := T_SW*M_S
x_w := transpose(M_W)[:, 0]
y_w := transpose(M_W)[:, 1]
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